<neuroml xmlns="http://www.neuroml.org/schema/neuroml2" xmlns:xsi="http://www.w3.org/2001/XMLSchema-instance" xsi:schemaLocation="http://www.neuroml.org/schema/neuroml2 https://raw.github.com/NeuroML/NeuroML2/development/Schemas/NeuroML2/NeuroML_v2.2.xsd" id="NeuroML2_file_exported_from_NEURON">
    <include href="Im.channel.nml" />
    <include href="Ih.channel.nml" />
    <include href="NaTs.channel.nml" />
    <include href="Nap.channel.nml" />
    <include href="K_P.channel.nml" />
    <include href="K_T.channel.nml" />
    <include href="SK.channel.nml" />
    <include href="Kv3_1.channel.nml" />
    <include href="pas.channel.nml" />
    <include href="Ca_HVA.channel.nml" />
    <include href="Ca_LVA.channel.nml" />
    <include href="CaDynamics_all.nml" />
    <cell id="Cell_480624414">
        <notes>

Export of a cell model (480624414) obtained from the Allen Institute Cell Types Database into NeuroML2

Electrophysiology on which this model is based: http://celltypes.brain-map.org/mouse/experiment/electrophysiology/471129934

******************************************************
*  This export to NeuroML2 has not yet been fully validated!!
*  Use with caution!!
******************************************************

        </notes>
        <morphology id="morphology">
            <segment id="0" name="Seg0_soma_0">
                <proximal x="6.317660e+02" y="6.969250e+02" z="4.648000e+01" diameter="19.5782" />
                <distal x="6.415550e+02" y="6.969250e+02" z="4.648000e+01" diameter="19.5782" />
            </segment>
            <segment id="2" name="Seg1_soma_0">
                <parent segment="0" />
                <distal x="6.513440e+02" y="6.969250e+02" z="4.648000e+01" diameter="19.5782" />
            </segment>
            <segment id="4073" name="Seg0_axon_0">
                <parent segment="0" />
                <proximal x="6.415550e+02" y="6.969250e+02" z="4.648000e+01" diameter="1.0" />
                <distal x="6.473960e+02" y="7.107410e+02" z="4.648000e+01" diameter="1.0" />
            </segment>
            <segment id="4074" name="Seg1_axon_0">
                <parent segment="4073" />
                <distal x="6.532380e+02" y="7.245570e+02" z="4.648000e+01" diameter="1.0" />
            </segment>
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            <segmentGroup neuroLexId="sao864921383" id="soma_0">
                <notes>This group contains an unbranched set of segments, and all of the segmentGroups marked with
             neuroLexId = sao864921383 form a non-overlapping set of all of the segments.
             These segmentGroups correspond to the 'cables' of NeuroML v1.8.1, and map to/from NEURON sections.</notes>
                <member segment="0" />
                <member segment="2" />
            </segmentGroup>
            <segmentGroup neuroLexId="sao864921383" id="axon_0">
                <notes>This group contains an unbranched set of segments, and all of the segmentGroups marked with
             neuroLexId = sao864921383 form a non-overlapping set of all of the segments.
             These segmentGroups correspond to the 'cables' of NeuroML v1.8.1, and map to/from NEURON sections.</notes>
                <member segment="4073" />
                <member segment="4074" />
            </segmentGroup>
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            <segmentGroup id="all">
                <include segmentGroup="soma_0" />
                <include segmentGroup="axon_0" />
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            </segmentGroup>
            <segmentGroup id="ModelViewParmSubset_1107">
                <include segmentGroup="soma_0" />
                <include segmentGroup="axon_0" />
                <include segmentGroup="axon_1" />
            </segmentGroup>
            <segmentGroup id="ModelViewParmSubset_1108">
                <include segmentGroup="dend_65" />
                <include segmentGroup="dend_64" />
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            </segmentGroup>
            <segmentGroup id="dend">
                <include segmentGroup="dend_65" />
                <include segmentGroup="dend_64" />
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            </segmentGroup>
            <segmentGroup id="axon">
                <include segmentGroup="axon_0" />
                <include segmentGroup="axon_1" />
            </segmentGroup>
            <segmentGroup id="apic">
                <include segmentGroup="apic_0" />
                <include segmentGroup="apic_4" />
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            </segmentGroup>
            <segmentGroup id="soma">
                <include segmentGroup="soma_0" />
            </segmentGroup>
            <segmentGroup id="soma_group">
                <include segmentGroup="soma" />
            </segmentGroup>
            <segmentGroup id="axon_group">
                <include segmentGroup="axon" />
            </segmentGroup>
            <segmentGroup id="dendrite_group">
                <include segmentGroup="dend" />
            </segmentGroup>
        </morphology>
        <biophysicalProperties id="biophys">
            <membraneProperties>
                <channelDensity id="Im_soma" ionChannel="Im" condDensity="0.0017021969926354075 S_per_cm2" erev="-107.0 mV" segmentGroup="soma" ion="k" />
                <channelDensity id="Ih_soma" ionChannel="Ih" condDensity="0.005809327257033259 S_per_cm2" erev="-45 mV" segmentGroup="soma" ion="hcn" />
                <channelDensity id="NaTs_soma" ionChannel="NaTs" condDensity="0.4500434187931579 S_per_cm2" erev="53.0 mV" segmentGroup="soma" ion="na" />
                <channelDensity id="Nap_soma" ionChannel="Nap" condDensity="0.0002035236768981652 S_per_cm2" erev="53.0 mV" segmentGroup="soma" ion="na" />
                <channelDensity id="K_P_soma" ionChannel="K_P" condDensity="4.9974946837560985e-05 S_per_cm2" erev="-107.0 mV" segmentGroup="soma" ion="k" />
                <channelDensity id="K_T_soma" ionChannel="K_T" condDensity="0.00011584968579736454 S_per_cm2" erev="-107.0 mV" segmentGroup="soma" ion="k" />
                <channelDensity id="SK_soma" ionChannel="SK" condDensity="0.00011212128541870925 S_per_cm2" erev="-107.0 mV" segmentGroup="soma" ion="k" />
                <channelDensity id="Kv3_1_soma" ionChannel="Kv3_1" condDensity="0.11502602490729219 S_per_cm2" erev="-107.0 mV" segmentGroup="soma" ion="k" />
                <channelDensity id="pas_soma" ionChannel="pas" condDensity="0.0004433895019254869 S_per_cm2" erev="-83.23534393310547 mV" segmentGroup="soma" ion="non_specific" />
                <channelDensity id="pas_axon" ionChannel="pas" condDensity="0.0003902051048604008 S_per_cm2" erev="-83.23534393310547 mV" segmentGroup="axon" ion="non_specific" />
                <channelDensity id="pas_dend" ionChannel="pas" condDensity="0.00018908380103690406 S_per_cm2" erev="-83.23534393310547 mV" segmentGroup="dend" ion="non_specific" />
                <channelDensity id="pas_apic" ionChannel="pas" condDensity="0.0006239509667691214 S_per_cm2" erev="-83.23534393310547 mV" segmentGroup="apic" ion="non_specific" />
                <channelDensityNernst id="Ca_HVA_soma" ionChannel="Ca_HVA" condDensity="6.533224373064728e-05 S_per_cm2" segmentGroup="soma" ion="ca" />
                <channelDensityNernst id="Ca_LVA_soma" ionChannel="Ca_LVA" condDensity="0.00019446563340947993 S_per_cm2" segmentGroup="soma" ion="ca" />
                <specificCapacitance value="1.0 uF_per_cm2" segmentGroup="soma" />
                <specificCapacitance value="1.0 uF_per_cm2" segmentGroup="axon" />
                <specificCapacitance value="3.1324510176309186 uF_per_cm2" segmentGroup="dend" />
                <specificCapacitance value="3.1324510176309186 uF_per_cm2" segmentGroup="apic" />
            </membraneProperties>
            <intracellularProperties>
                <species id="ca" concentrationModel="CaDynamics_480624414" ion="ca" initialConcentration="0.0001 mM" initialExtConcentration="2 mM" segmentGroup="soma" />
                <resistivity value="58.0543614278 ohm_cm" segmentGroup="all" />
            </intracellularProperties>
        </biophysicalProperties>
    </cell>
</neuroml>
