<neuroml xmlns="http://www.neuroml.org/schema/neuroml2" xmlns:xsi="http://www.w3.org/2001/XMLSchema-instance" xsi:schemaLocation="http://www.neuroml.org/schema/neuroml2 https://raw.github.com/NeuroML/NeuroML2/development/Schemas/NeuroML2/NeuroML_v2.2.xsd" id="NeuroML2_file_exported_from_NEURON">
    <include href="Ih.channel.nml" />
    <include href="NaV.channel.nml" />
    <include href="Kd.channel.nml" />
    <include href="Kv2like.channel.nml" />
    <include href="Kv3_1.channel.nml" />
    <include href="K_T.channel.nml" />
    <include href="Im_v2.channel.nml" />
    <include href="SK.channel.nml" />
    <include href="pas.channel.nml" />
    <include href="Ca_HVA.channel.nml" />
    <include href="Ca_LVA.channel.nml" />
    <include href="CaDynamics_all.nml" />
    <cell id="Cell_480629276">
        <notes>

Export of a cell model (480629276) obtained from the Allen Institute Cell Types Database into NeuroML2

Electrophysiology on which this model is based: http://celltypes.brain-map.org/mouse/experiment/electrophysiology/324266189

******************************************************
*  This export to NeuroML2 has not yet been fully validated!!
*  Use with caution!!
******************************************************

        </notes>
        <morphology id="morphology">
            <segment id="0" name="Seg0_soma_0">
                <proximal x="3.163410e+02" y="4.955480e+02" z="4.903140e+01" diameter="11.9616" />
                <distal x="3.223220e+02" y="4.955480e+02" z="4.903140e+01" diameter="11.9616" />
            </segment>
            <segment id="2" name="Seg1_soma_0">
                <parent segment="0" />
                <distal x="3.283030e+02" y="4.955480e+02" z="4.903140e+01" diameter="11.9616" />
            </segment>
            <segment id="1401" name="Seg0_axon_0">
                <parent segment="0" />
                <proximal x="3.223220e+02" y="4.955480e+02" z="4.903140e+01" diameter="1.0" />
                <distal x="3.281630e+02" y="5.093640e+02" z="4.903140e+01" diameter="1.0" />
            </segment>
            <segment id="1402" name="Seg1_axon_0">
                <parent segment="1401" />
                <distal x="3.340050e+02" y="5.231790e+02" z="4.903140e+01" diameter="1.0" />
            </segment>
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            <segmentGroup neuroLexId="sao864921383" id="soma_0">
                <notes>This group contains an unbranched set of segments, and all of the segmentGroups marked with
             neuroLexId = sao864921383 form a non-overlapping set of all of the segments.
             These segmentGroups correspond to the 'cables' of NeuroML v1.8.1, and map to/from NEURON sections.</notes>
                <member segment="0" />
                <member segment="2" />
            </segmentGroup>
            <segmentGroup neuroLexId="sao864921383" id="axon_0">
                <notes>This group contains an unbranched set of segments, and all of the segmentGroups marked with
             neuroLexId = sao864921383 form a non-overlapping set of all of the segments.
             These segmentGroups correspond to the 'cables' of NeuroML v1.8.1, and map to/from NEURON sections.</notes>
                <member segment="1401" />
                <member segment="1402" />
            </segmentGroup>
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            <segmentGroup id="all">
                <include segmentGroup="soma_0" />
                <include segmentGroup="axon_0" />
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            </segmentGroup>
            <segmentGroup id="ModelViewParmSubset_1319">
                <include segmentGroup="soma_0" />
                <include segmentGroup="axon_0" />
                <include segmentGroup="axon_1" />
            </segmentGroup>
            <segmentGroup id="dend">
                <include segmentGroup="dend_19" />
                <include segmentGroup="dend_6" />
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            </segmentGroup>
            <segmentGroup id="axon">
                <include segmentGroup="axon_0" />
                <include segmentGroup="axon_1" />
            </segmentGroup>
            <segmentGroup id="soma">
                <include segmentGroup="soma_0" />
            </segmentGroup>
            <segmentGroup id="soma_group">
                <include segmentGroup="soma" />
            </segmentGroup>
            <segmentGroup id="axon_group">
                <include segmentGroup="axon" />
            </segmentGroup>
            <segmentGroup id="dendrite_group">
                <include segmentGroup="dend" />
            </segmentGroup>
        </morphology>
        <biophysicalProperties id="biophys">
            <membraneProperties>
                <channelDensity id="Ih_soma" ionChannel="Ih" condDensity="4.900841807841265e-05 S_per_cm2" erev="-45 mV" segmentGroup="soma" ion="hcn" />
                <channelDensity id="NaV_soma" ionChannel="NaV" condDensity="0.09043414081574534 S_per_cm2" erev="53.0 mV" segmentGroup="soma" ion="na" />
                <channelDensity id="Kd_soma" ionChannel="Kd" condDensity="1.7811599055964329e-06 S_per_cm2" erev="-107.0 mV" segmentGroup="soma" ion="k" />
                <channelDensity id="Kv2like_soma" ionChannel="Kv2like" condDensity="0.03802199674987644 S_per_cm2" erev="-107.0 mV" segmentGroup="soma" ion="k" />
                <channelDensity id="Kv3_1_soma" ionChannel="Kv3_1" condDensity="0.4463070991413206 S_per_cm2" erev="-107.0 mV" segmentGroup="soma" ion="k" />
                <channelDensity id="K_T_soma" ionChannel="K_T" condDensity="1.0061393063629724e-05 S_per_cm2" erev="-107.0 mV" segmentGroup="soma" ion="k" />
                <channelDensity id="Im_v2_soma" ionChannel="Im_v2" condDensity="0.0014587612029596658 S_per_cm2" erev="-107.0 mV" segmentGroup="soma" ion="k" />
                <channelDensity id="SK_soma" ionChannel="SK" condDensity="0.0011801481501301642 S_per_cm2" erev="-107.0 mV" segmentGroup="soma" ion="k" />
                <channelDensity id="pas_soma" ionChannel="pas" condDensity="9.834683663652371e-05 S_per_cm2" erev="-83.94720458984375 mV" segmentGroup="soma" ion="non_specific" />
                <channelDensity id="pas_axon" ionChannel="pas" condDensity="0.0008765132227717548 S_per_cm2" erev="-83.94720458984375 mV" segmentGroup="axon" ion="non_specific" />
                <channelDensity id="pas_dend" ionChannel="pas" condDensity="0.00020138102824223837 S_per_cm2" erev="-83.94720458984375 mV" segmentGroup="dend" ion="non_specific" />
                <channelDensityNernst id="Ca_HVA_soma" ionChannel="Ca_HVA" condDensity="3.205916379709359e-05 S_per_cm2" segmentGroup="soma" ion="ca" />
                <channelDensityNernst id="Ca_LVA_soma" ionChannel="Ca_LVA" condDensity="0.0011658842760952218 S_per_cm2" segmentGroup="soma" ion="ca" />
                <specificCapacitance value="1.0 uF_per_cm2" segmentGroup="soma" />
                <specificCapacitance value="1.0 uF_per_cm2" segmentGroup="axon" />
                <specificCapacitance value="3.833902628260204 uF_per_cm2" segmentGroup="dend" />
            </membraneProperties>
            <intracellularProperties>
                <species id="ca" concentrationModel="CaDynamics_480629276" ion="ca" initialConcentration="0.0001 mM" initialExtConcentration="2 mM" segmentGroup="soma" />
                <resistivity value="17.7971735095 ohm_cm" segmentGroup="all" />
            </intracellularProperties>
        </biophysicalProperties>
    </cell>
</neuroml>
