<neuroml xmlns="http://www.neuroml.org/schema/neuroml2" xmlns:xsi="http://www.w3.org/2001/XMLSchema-instance" xsi:schemaLocation="http://www.neuroml.org/schema/neuroml2 https://raw.github.com/NeuroML/NeuroML2/development/Schemas/NeuroML2/NeuroML_v2.2.xsd" id="NeuroML2_file_exported_from_NEURON">
    <include href="Ih.channel.nml" />
    <include href="NaV.channel.nml" />
    <include href="Kd.channel.nml" />
    <include href="Kv2like.channel.nml" />
    <include href="Kv3_1.channel.nml" />
    <include href="K_T.channel.nml" />
    <include href="Im_v2.channel.nml" />
    <include href="SK.channel.nml" />
    <include href="pas.channel.nml" />
    <include href="Ca_HVA.channel.nml" />
    <include href="Ca_LVA.channel.nml" />
    <include href="CaDynamics_all.nml" />
    <cell id="Cell_486509958">
        <notes>

Export of a cell model (486509958) obtained from the Allen Institute Cell Types Database into NeuroML2

Electrophysiology on which this model is based: http://celltypes.brain-map.org/mouse/experiment/electrophysiology/485931158

******************************************************
*  This export to NeuroML2 has not yet been fully validated!!
*  Use with caution!!
******************************************************

        </notes>
        <morphology id="morphology">
            <segment id="0" name="Seg0_soma_0">
                <proximal x="5.332310e+02" y="6.134130e+02" z="1.736000e+01" diameter="10.9564" />
                <distal x="5.387100e+02" y="6.134130e+02" z="1.736000e+01" diameter="10.9564" />
            </segment>
            <segment id="2" name="Seg1_soma_0">
                <parent segment="0" />
                <distal x="5.441880e+02" y="6.134130e+02" z="1.736000e+01" diameter="10.9564" />
            </segment>
            <segment id="2326" name="Seg0_axon_0">
                <parent segment="0" />
                <proximal x="5.387100e+02" y="6.134130e+02" z="1.736000e+01" diameter="1.0" />
                <distal x="5.445510e+02" y="6.272290e+02" z="1.736000e+01" diameter="1.0" />
            </segment>
            <segment id="2327" name="Seg1_axon_0">
                <parent segment="2326" />
                <distal x="5.503920e+02" y="6.410450e+02" z="1.736000e+01" diameter="1.0" />
            </segment>
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            <segmentGroup neuroLexId="sao864921383" id="soma_0">
                <notes>This group contains an unbranched set of segments, and all of the segmentGroups marked with
             neuroLexId = sao864921383 form a non-overlapping set of all of the segments.
             These segmentGroups correspond to the 'cables' of NeuroML v1.8.1, and map to/from NEURON sections.</notes>
                <member segment="0" />
                <member segment="2" />
            </segmentGroup>
            <segmentGroup neuroLexId="sao864921383" id="axon_0">
                <notes>This group contains an unbranched set of segments, and all of the segmentGroups marked with
             neuroLexId = sao864921383 form a non-overlapping set of all of the segments.
             These segmentGroups correspond to the 'cables' of NeuroML v1.8.1, and map to/from NEURON sections.</notes>
                <member segment="2326" />
                <member segment="2327" />
            </segmentGroup>
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            <segmentGroup id="all">
                <include segmentGroup="soma_0" />
                <include segmentGroup="axon_0" />
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            </segmentGroup>
            <segmentGroup id="ModelViewParmSubset_147">
                <include segmentGroup="soma_0" />
                <include segmentGroup="axon_0" />
                <include segmentGroup="axon_1" />
            </segmentGroup>
            <segmentGroup id="ModelViewParmSubset_148">
                <include segmentGroup="dend_22" />
                <include segmentGroup="dend_17" />
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            </segmentGroup>
            <segmentGroup id="apic">
                <include segmentGroup="apic_0" />
                <include segmentGroup="apic_6" />
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            </segmentGroup>
            <segmentGroup id="dend">
                <include segmentGroup="dend_22" />
                <include segmentGroup="dend_17" />
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            </segmentGroup>
            <segmentGroup id="axon">
                <include segmentGroup="axon_0" />
                <include segmentGroup="axon_1" />
            </segmentGroup>
            <segmentGroup id="soma">
                <include segmentGroup="soma_0" />
            </segmentGroup>
            <segmentGroup id="soma_group">
                <include segmentGroup="soma" />
            </segmentGroup>
            <segmentGroup id="axon_group">
                <include segmentGroup="axon" />
            </segmentGroup>
            <segmentGroup id="dendrite_group">
                <include segmentGroup="dend" />
            </segmentGroup>
        </morphology>
        <biophysicalProperties id="biophys">
            <membraneProperties>
                <channelDensity id="Ih_soma" ionChannel="Ih" condDensity="2.537472576587171e-06 S_per_cm2" erev="-45 mV" segmentGroup="soma" ion="hcn" />
                <channelDensity id="NaV_soma" ionChannel="NaV" condDensity="0.34453074059624594 S_per_cm2" erev="53.0 mV" segmentGroup="soma" ion="na" />
                <channelDensity id="Kd_soma" ionChannel="Kd" condDensity="2.1562149985856615e-11 S_per_cm2" erev="-107.0 mV" segmentGroup="soma" ion="k" />
                <channelDensity id="Kv2like_soma" ionChannel="Kv2like" condDensity="0.011400590254160202 S_per_cm2" erev="-107.0 mV" segmentGroup="soma" ion="k" />
                <channelDensity id="Kv3_1_soma" ionChannel="Kv3_1" condDensity="0.2377507986732859 S_per_cm2" erev="-107.0 mV" segmentGroup="soma" ion="k" />
                <channelDensity id="K_T_soma" ionChannel="K_T" condDensity="0.021795766278746794 S_per_cm2" erev="-107.0 mV" segmentGroup="soma" ion="k" />
                <channelDensity id="Im_v2_soma" ionChannel="Im_v2" condDensity="0.011617082423130925 S_per_cm2" erev="-107.0 mV" segmentGroup="soma" ion="k" />
                <channelDensity id="SK_soma" ionChannel="SK" condDensity="0.0008353843492395902 S_per_cm2" erev="-107.0 mV" segmentGroup="soma" ion="k" />
                <channelDensity id="pas_soma" ionChannel="pas" condDensity="0.00040582050830603744 S_per_cm2" erev="-95.52335357666016 mV" segmentGroup="soma" ion="non_specific" />
                <channelDensity id="pas_axon" ionChannel="pas" condDensity="0.0005437630356649297 S_per_cm2" erev="-95.52335357666016 mV" segmentGroup="axon" ion="non_specific" />
                <channelDensity id="pas_dend" ionChannel="pas" condDensity="6.966002961666636e-05 S_per_cm2" erev="-95.52335357666016 mV" segmentGroup="dend" ion="non_specific" />
                <channelDensity id="pas_apic" ionChannel="pas" condDensity="4.627530205532932e-05 S_per_cm2" erev="-95.52335357666016 mV" segmentGroup="apic" ion="non_specific" />
                <channelDensityNernst id="Ca_HVA_soma" ionChannel="Ca_HVA" condDensity="0.00038419005745996053 S_per_cm2" segmentGroup="soma" ion="ca" />
                <channelDensityNernst id="Ca_LVA_soma" ionChannel="Ca_LVA" condDensity="0.000205699251734468 S_per_cm2" segmentGroup="soma" ion="ca" />
                <specificCapacitance value="1.0 uF_per_cm2" segmentGroup="soma" />
                <specificCapacitance value="1.0 uF_per_cm2" segmentGroup="axon" />
                <specificCapacitance value="2.523057408207212 uF_per_cm2" segmentGroup="dend" />
                <specificCapacitance value="2.523057408207212 uF_per_cm2" segmentGroup="apic" />
            </membraneProperties>
            <intracellularProperties>
                <species id="ca" concentrationModel="CaDynamics_486509958" ion="ca" initialConcentration="0.0001 mM" initialExtConcentration="2 mM" segmentGroup="soma" />
                <resistivity value="28.292678117573736 ohm_cm" segmentGroup="all" />
            </intracellularProperties>
        </biophysicalProperties>
    </cell>
</neuroml>
